// COMSOL Multiphysics 5.5.0.359 model "elmagc1-1.mph"
// Outline of the model tree

Parameters
  rho = 0.001 [C/m^3]
  R0 = 0.05 [m]
  R1 = 1 [m]

Geometry
  geom1 "Geometry 1" (2D, length unit m)
    c1: Circle | r = R1
    c2: Circle | r = R0
    fin: Finalize "Form Union"

Physics
  es: Electrostatics on all domains
    dependent variable V
    ccn1: ChargeConservation (default) | epsilonr_mat = userdef; epsilonr = 1
    zc1: ZeroCharge (default)
    init1: init "Initial Values 1" (default)
    gnd1: Ground on boundaries 1, 2, 5, 8
    scd1: SpaceChargeDensity on domains 2 | rhoq = rho

Mesh
  mesh1 "Mesh 1" (physics-controlled)
    size: MeshSizeDefault | hauto = 3

Studies
  std1 "Study 1"
    stat: Stationary

Solver configurations
  sol1 "Solution 1" (study std1)
    v1: Variables "Dependent Variables 1"
    s1: Stationary "Stationary Solver 1"
      dDef: Direct
      fc1: FullyCoupled | linsolver = dDef

Datasets
  dset1: Solution | solution = sol1

Plots
  pg1: PlotGroup2D "Electric Potential (es)" | data = dset1
    surf1: Surface | expr = es.normE; descr = Electric field norm
    arws1: ArrowSurface | expr = {es.Ex, es.Ey}; xnumber = 13; ynumber = 13; arrowlength = normalized