// COMSOL Multiphysics 5.5.0.359 model "c2.2.mph"
// Outline of the model tree

Geometry
  geom1 "Geometry 1" (2D, length unit m)
    r1: Rectangle | base = center; size = {3, 1}
    r2: Rectangle | base = center; size = {0.4, 1}
    fin: Finalize "Form Union"

Physics
  ec: ConductiveMedia "Electric Currents" on all domains
    dependent variable V
    cucn1: CurrentConservation (default) | sigma_mat = userdef; sigma = 1; epsilonr_mat = userdef; epsilonr = 1
    ein1: ElectricInsulation (default)
    init1: init "Initial Values 1" (default)
    gnd1: Ground on boundaries 10
    pot1: ElectricPotential on boundaries 1 | V0 = 5
    cucn2: CurrentConservation on domains 2 | sigma_mat = userdef; sigma = 0.1; epsilonr_mat = userdef; epsilonr = 1

Mesh
  mesh1 "Mesh 1" (physics-controlled)
    size: MeshSizeDefault | hauto = 3

Studies
  std1 "Study 1"
    stat: Stationary

Solver configurations
  sol1 "Solution 1" (study std1)
    v1: Variables "Dependent Variables 1"
    s1: Stationary "Stationary Solver 1"
      dDef: Direct
      fc1: FullyCoupled | linsolver = dDef

Datasets
  dset1: Solution | solution = sol1

Plots
  pg1: PlotGroup2D "Electric Potential (ec)" | data = dset1
    surf1: Surface (disabled) | expr = V
    arws1: ArrowSurface | expr = {ec.Jx, ec.Jy}; ynumber = 13
    surf2: Surface | expr = ec.Ex; descr = Electric field, x component
  pg2: PlotGroup2D "2D Plot Group 2" | data = dset1
    surf1: Surface | expr = ec.rhoq; descr = Space charge density
    arws1: ArrowSurface | expr = {ec.Jx, ec.Jy}; descr = Current density