// COMSOL Multiphysics 5.5.0.359 model "c2.3.mph"
// Outline of the model tree

Geometry
  geom1 "Geometry 1" (2D, length unit m)
    r1: Rectangle | base = center; size = {0.8, 1.2}
    r2: Rectangle | base = center; size = {0.05, 0.2}
    fin: Finalize "Form Union"

Physics
  es: Electrostatics on all domains
    dependent variable V
    ccn1: ChargeConservation (default) | epsilonr_mat = userdef; epsilonr = 1
    zc1: ZeroCharge (default)
    init1: init "Initial Values 1" (default)
    pot1: ElectricPotential on boundaries 3 | V0 = 4
    gnd1: Ground on boundaries 2
    ccn2: ChargeConservation on domains 2 | epsilonr_mat = userdef; epsilonr = 4

Mesh
  mesh1 "Mesh 1" (physics-controlled)
    size: MeshSizeDefault | hauto = 1

Studies
  std1 "Study 1"
    stat: Stationary

Solver configurations
  sol1 "Solution 1" (study std1)
    v1: Variables "Dependent Variables 1"
    s1: Stationary "Stationary Solver 1"
      dDef: Direct
      fc1: FullyCoupled | linsolver = dDef

Datasets
  dset1: Solution | solution = sol1

Plots
  pg1: PlotGroup2D "Electric Potential (es)" | data = dset1
    surf1: Surface | expr = es.normD; descr = Electric displacement field norm
    arws1: ArrowSurface | expr = {es.Ex, es.Ey}; xnumber = 18; ynumber = 18
    arws2: ArrowSurface | expr = {es.Dx, es.Dy}; descr = Electric displacement field
  pg2: PlotGroup2D "2D Plot Group 2" | data = dset1
    surf1: Surface | expr = es.normP
    arws1: ArrowSurface | expr = {es.Px, es.Py}